*node, nset=nall
1, 1, 0, 0
2, 1, 0, 4
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*nset, nset=BOTTOM
1, 22, 23, 24, 25, 26
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*shell section, material=steel, elset=S4R
1.0
*element, elset=S4R,type=S4R
85, 2, 83, 84, 21,
86, 83, 82, 85, 84,
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
*elset, elset=ALL
85, 86, 87, 88, 89, 90, 91,
92, 93, 94, 95, 96, 97, 98, 99,
100, 101, 102, 103, 104, 105, 106, 107,
108, 109, 110, 111, 112, 113, 114, 115,
116, 117, 118, 119, 120, 121, 122, 123,
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724, *material, name=steel
*elastic
209000.0, 0.3
*density
7.85e-09
*step
*frequency
12
*nodefile
u
*elfile, output=3D
s, e
*endstep
