*node, nset=nall
1, 1, -2.44929e-16, 4
2, 1, -2.44929e-16, 0
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*nset, nset=BOTTOM
1042, 1043, 1044, 1045, 1046, 1047
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*solid section, material=steel, elset=C3D4
*element, elset=C3D4,type=C3D4
4089, 1753, 856, 868, 1768,
4090, 857, 827, 1727, 1756,
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
*elset, elset=PRESSUREF1
9939, 9810, 7624, 9274, 6079, 6348
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*elset, elset=PRESSUREF2
6691, 6966, 5563, 7451, 4292, 4300
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*elset, elset=PRESSUREF3
9981, 10134, 6369, 8236, 4945, 9744
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*elset, elset=PRESSUREF4
4724, 8562, 5128, 9393, 8527, 6769
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*surface, type=element, name=sPRESSURE
PRESSUREF1, S1
PRESSUREF2, S2
PRESSUREF3, S3
PRESSUREF4, S4

*material, name=steel
*elastic
209000.0, 0.3
*density
7.85e-09
*step
*frequency
12
*nodefile
u
*elfile, output=3D
s, e
*endstep
